*Heading
** Job name: ex-1-Uniaxialtension Model name: Model-1
** Generated by: Abaqus/CAE 2020
*Preprint, echo=NO, model=NO, history=NO, contact=NO
**
** PARTS
**
*Part, name=block
*Node
      1,           0.,           0.,           2.
      2,           0.,           2.,           2.
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*Element, type=C3D20R
  1,   17,   18,   22,   21,    1,    2,    6,    5,  372,  371,  370,  369,  373,  374,  375,
      376,  378,  377,  379,  380
  2,   18,   19,   23,   22,    2,    3,    7,    6,  383,  382,  381,  371,  384,  385,  386,
      374,  377,  387,  388,  379
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*Nset, nset=ALL, generate
    1,  1272,     1
*Elset, elset=ALL, generate
   1,  198,    1
*Nset, nset=_PickedSet6, internal, generate
    1,  1272,     1
*Elset, elset=_PickedSet6, internal, generate
   1,  198,    1
*Orientation, name=Ori-1
0.707106781186548, 0.707106781186548,           0., -0.707106781186548, 0.707106781186548,           0.
3, 0.
** Section: Section-1
*Solid Section, elset=_PickedSet6, orientation=Ori-1, material=Material-1
,
*End Part
**
**
** ASSEMBLY
**
*Assembly, name=Assembly
**
*Instance, name=block-1, part=block
*End Instance
**
*Node
      1,           0.,           3.,           1.
*Node
      2,          33.,           3.,           1.
*Nset, nset=RP1
 1,
*Nset, nset=RP2
 2,
*Nset, nset=block, instance=block-1, generate
    1,  1272,     1
*Elset, elset=block, instance=block-1, generate
   1,  198,    1
*Nset, nset=tem, instance=block-1
 4,
*Nset, nset=_PickedSet15, internal
 1,
*Nset, nset=_PickedSet17, internal
 2,
*Elset, elset=__PickedSurf14_S2, internal, instance=block-1, generate
 1,  9,  1
*Surface, type=ELEMENT, name=_PickedSurf14, internal
__PickedSurf14_S2, S2
*Elset, elset=__PickedSurf16_S1, internal, instance=block-1, generate
 190,  198,    1
*Surface, type=ELEMENT, name=_PickedSurf16, internal
__PickedSurf16_S1, S1
** Constraint: Constraint-1
*Coupling, constraint name=Constraint-1, ref node=_PickedSet15, surface=_PickedSurf14
*Kinematic
** Constraint: Constraint-2
*Coupling, constraint name=Constraint-2, ref node=_PickedSet17, surface=_PickedSurf16
*Kinematic
*End Assembly
*Amplitude, name=cold
             0.,            343.,             50.,            298.
*Amplitude, name=heat
             0.,            298.,             50.,            353.
*Amplitude, name=load
             0.,              0.,             20.,              1.
**
** MATERIALS
**
*Material, name=Material-1
*Depvar
     43,
*User Material, constants=43
 0.1,       1.,      10.,     100.,    1000.,   10000.,  10319.1,  200.254
  89.0021,  288.039,  322.882,  29.7953,  1.08799,  1.77138,   183.83,  82.8455
  272.998,  318.639,  30.0832,   1.0973,  2.83844,  293.707,  132.426,  436.637
  510.272,  48.2092,  1.75608,  1.82402,  188.472,  84.9984,  280.342,  327.818
  30.9813,   1.1279, 0.530688,  55.3091,  24.9132,  82.0325,  95.5597,  9.01153
 0.328643,  3.7e-06,  0.00012
**
** BOUNDARY CONDITIONS
**
** Name: BC-1 Type: Displacement/Rotation
*Boundary
RP1, 1, 1
RP1, 2, 2
RP1, 3, 3
RP1, 4, 4
RP1, 5, 5
RP1, 6, 6
** Name: BC-2 Type: Displacement/Rotation
*Boundary
RP2, 1, 1
RP2, 2, 2
RP2, 3, 3
RP2, 4, 4
RP2, 5, 5
RP2, 6, 6
**
** PREDEFINED FIELDS
**
** Name: Predefined Field-1   Type: Temperature
*Initial Conditions, type=TEMPERATURE
block, 343.
** ----------------------------------------------------------------
**
** STEP: Step-1
**
*Step, name=Step-1, nlgeom=YES, inc=10000
*Visco, cetol=0.01
0.01, 20., 1e-06, 1.
**
** OUTPUT REQUESTS
**
*Restart, write, frequency=0
**
** FIELD OUTPUT: F-Output-1
**
*Output, field
*Node Output
CF, RF, U
*Element Output, directions=YES
E, IE, LE, MISES, S
**
** HISTORY OUTPUT: H-Output-2
**
*Output, history
*Node Output, nset=RP2
RF1, RF2, RF3, RM1, RM2, RM3, U1, U2
U3, UR1, UR2, UR3
**
** HISTORY OUTPUT: H-Output-3
**
*Node Output, nset=tem
NT,
**
** HISTORY OUTPUT: H-Output-1
**
*Output, history, variable=PRESELECT
*End Step
** ----------------------------------------------------------------
**
** STEP: Step-2
**
*Step, name=Step-2, nlgeom=YES, inc=10000
*Visco, cetol=1e-06
0.1, 50., 0.0005, 2.
**
** BOUNDARY CONDITIONS
**
** Name: BC-1 Type: Displacement/Rotation
*Boundary, op=NEW
RP1, 1, 1
RP1, 2, 2
RP1, 3, 3
RP1, 4, 4
RP1, 5, 5
RP1, 6, 6
** Name: BC-2 Type: Displacement/Rotation
*Boundary, op=NEW, amplitude=load
RP2, 1, 1, 5.
RP2, 2, 2
RP2, 3, 3
**
** PREDEFINED FIELDS
**
** Name: Predefined Field-1   Type: Temperature
*Temperature, amplitude=cold
block, 1.
**
** OUTPUT REQUESTS
**
*Restart, write, frequency=0
**
** FIELD OUTPUT: F-Output-1
**
*Output, field
*Node Output
CF, RF, U
*Element Output, directions=YES
E, IE, LE, MISES, S
**
** HISTORY OUTPUT: H-Output-2
**
*Output, history
*Node Output, nset=RP2
RF1, RF2, RF3, RM1, RM2, RM3, U1, U2
U3, UR1, UR2, UR3
**
** HISTORY OUTPUT: H-Output-3
**
*Node Output, nset=tem
NT,
**
** HISTORY OUTPUT: H-Output-1
**
*Output, history, variable=PRESELECT
*End Step
** ----------------------------------------------------------------
**
** STEP: Step-3
**
*Step, name=Step-3, nlgeom=YES
*Visco, cetol=1e-06
0.01, 1., 1e-05, 1.
**
** BOUNDARY CONDITIONS
**
** Name: BC-1 Type: Displacement/Rotation
*Boundary, op=NEW
RP1, 1, 1
RP1, 2, 2
RP1, 3, 3
RP1, 4, 4
RP1, 5, 5
RP1, 6, 6
** Name: BC-2 Type: Displacement/Rotation
*Boundary, op=NEW
**
** OUTPUT REQUESTS
**
*Restart, write, frequency=0
**
** FIELD OUTPUT: F-Output-1
**
*Output, field
*Node Output
CF, RF, U
*Element Output, directions=YES
E, IE, LE, MISES, S
**
** HISTORY OUTPUT: H-Output-2
**
*Output, history
*Node Output, nset=RP2
RF1, RF2, RF3, RM1, RM2, RM3, U1, U2
U3, UR1, UR2, UR3
**
** HISTORY OUTPUT: H-Output-3
**
*Node Output, nset=tem
NT,
**
** HISTORY OUTPUT: H-Output-1
**
*Output, history, variable=PRESELECT
*End Step
** ----------------------------------------------------------------
**
** STEP: Step-4
**
*Step, name=Step-4, nlgeom=YES, inc=50000
*Visco, cetol=1e-06
0.01, 50., 0.0005, 0.1
**
** PREDEFINED FIELDS
**
** Name: Predefined Field-1   Type: Temperature
*Temperature, amplitude=heat
block, 1.
**
** OUTPUT REQUESTS
**
*Restart, write, frequency=0
**
** FIELD OUTPUT: F-Output-1
**
*Output, field
*Node Output
CF, RF, U
*Element Output, directions=YES
E, IE, LE, MISES, S
**
** HISTORY OUTPUT: H-Output-2
**
*Output, history
*Node Output, nset=RP2
RF1, RF2, RF3, RM1, RM2, RM3, U1, U2
U3, UR1, UR2, UR3
**
** HISTORY OUTPUT: H-Output-3
**
*Node Output, nset=tem
NT,
**
** HISTORY OUTPUT: H-Output-1
**
*Output, history, variable=PRESELECT
*End Step
