*Heading
** Job name: ex-5-Bending Model name: Model-5
** Generated by: Abaqus/CAE 2020
*Preprint, echo=NO, model=NO, history=NO, contact=NO
**
** PARTS
**
*Part, name=block
*Node
      1,         -62.,           0.,           2.
      2,         -62.,           1.,           2.
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*Element, type=C3D20R
   1,    43,    44,    58,    57,     1,     2,    16,    15,  4036,  4035,  4034,  4033,  4037,  4038,  4039,
       4040,  4042,  4041,  4043,  4044
   2,    44,    45,    59,    58,     2,     3,    17,    16,  4047,  4046,  4045,  4035,  4048,  4049,  4050,
       4038,  4041,  4051,  4052,  4043
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*Nset, nset=ALL, generate
     1,  14454,      1
*Elset, elset=ALL, generate
    1,  2470,     1
*Nset, nset=_PickedSet6, internal, generate
     1,  14454,      1
*Elset, elset=_PickedSet6, internal, generate
    1,  2470,     1
*Orientation, name=Ori-1
0.707106781186548, 0.707106781186548,           0., -0.707106781186548, 0.707106781186548,           0.
3, 0.
** Section: Section-1
*Solid Section, elset=_PickedSet6, orientation=Ori-1, material=Material-1
,
*End Part
**
**
** ASSEMBLY
**
*Assembly, name=Assembly
**
*Instance, name=block-1, part=block
         62.,           0.,           0.
*End Instance
**
*Node
      1,           0.,          6.5,           1.
*Node
      2,          95.,          6.5,           1.
*Nset, nset=RP1
 1,
*Nset, nset=RP2
 2,
*Nset, nset=block, instance=block-1, generate
     1,  14454,      1
*Elset, elset=block, instance=block-1, generate
    1,  2470,     1
*Nset, nset=tem, instance=block-1
 14,
*Nset, nset=_PickedSet15, internal
 1,
*Nset, nset=_PickedSet17, internal
 2,
*Elset, elset=__PickedSurf14_S2, internal, instance=block-1, generate
  1,  26,   1
*Surface, type=ELEMENT, name=_PickedSurf14, internal
__PickedSurf14_S2, S2
*Elset, elset=__PickedSurf16_S1, internal, instance=block-1, generate
 2445,  2470,     1
*Surface, type=ELEMENT, name=_PickedSurf16, internal
__PickedSurf16_S1, S1
** Constraint: Constraint-1
*Coupling, constraint name=Constraint-1, ref node=_PickedSet15, surface=_PickedSurf14
*Kinematic
** Constraint: Constraint-2
*Coupling, constraint name=Constraint-2, ref node=_PickedSet17, surface=_PickedSurf16
*Kinematic
*End Assembly
*Amplitude, name=coolingtem
             0.,            343.,             50.,            298.
*Amplitude, name=hold
             0.,              1.,             50.,              1.
*Amplitude, name=keeptem
             0.,            298.,              5.,            298.
*Amplitude, name=load
             0.,              0.,             20.,              1.
*Amplitude, name=rectem
             0.,            298.,             50.,            353.
**
** MATERIALS
**
*Material, name=Material-1
*Depvar
     43,
*User Material, constants=43
 0.1,       1.,      10.,     100.,    1000.,   10000.,  10319.1,  200.254
  89.0021,  288.039,  322.882,  29.7953,  1.08799,  1.77138,   183.83,  82.8455
  272.998,  318.639,  30.0832,   1.0973,  2.83844,  293.707,  132.426,  436.637
  510.272,  48.2092,  1.75608,  1.82402,  188.472,  84.9984,  280.342,  327.818
  30.9813,   1.1279, 0.530688,  55.3091,  24.9132,  82.0325,  95.5597,  9.01153
 0.328643,  3.7e-06,  0.00012
**
** BOUNDARY CONDITIONS
**
** Name: BC-1 Type: Displacement/Rotation
*Boundary
RP1, 1, 1
RP1, 2, 2
RP1, 3, 3
RP1, 4, 4
RP1, 5, 5
RP1, 6, 6
**
** PREDEFINED FIELDS
**
** Name: Predefined Field-1   Type: Temperature
*Initial Conditions, type=TEMPERATURE
block, 343.
** ----------------------------------------------------------------
**
** STEP: Step-1-High-temperature
**
*Step, name=Step-1-High-temperature, nlgeom=YES, inc=10000
*Visco, cetol=0.01
0.01, 20., 1e-06, 0.1
**
** BOUNDARY CONDITIONS
**
** Name: BC-2 Type: Displacement/Rotation
*Boundary, amplitude=load
RP2, 2, 2
RP2, 4, 4
RP2, 5, 5, 4.71
RP2, 6, 6
**
** OUTPUT REQUESTS
**
*Restart, write, frequency=0
**
** FIELD OUTPUT: F-Output-1
**
*Output, field, variable=PRESELECT
**
** HISTORY OUTPUT: H-Output-1
**
*Output, history, variable=PRESELECT
*End Step
** ----------------------------------------------------------------
**
** STEP: Step-2-Cooling
**
*Step, name=Step-2-Cooling, nlgeom=YES, inc=10000
*Visco, cetol=0.01
0.01, 50., 1e-05, 0.1
**
** PREDEFINED FIELDS
**
** Name: Predefined Field-1   Type: Temperature
*Temperature, amplitude=coolingtem
block, 1.
**
** OUTPUT REQUESTS
**
*Restart, write, frequency=0
**
** FIELD OUTPUT: F-Output-1
**
*Output, field, variable=PRESELECT
**
** HISTORY OUTPUT: H-Output-1
**
*Output, history, variable=PRESELECT
*End Step
** ----------------------------------------------------------------
**
** STEP: Step-3-Low-temperature unloading
**
*Step, name="Step-3-Low-temperature unloading", nlgeom=YES, inc=10000
*Visco, cetol=1e-06
0.01, 1., 1e-05, 0.1
**
** BOUNDARY CONDITIONS
**
** Name: BC-1 Type: Displacement/Rotation
*Boundary, op=NEW
RP1, 1, 1
RP1, 2, 2
RP1, 3, 3
RP1, 4, 4
RP1, 5, 5
RP1, 6, 6
** Name: BC-2 Type: Displacement/Rotation
*Boundary, op=NEW
**
** OUTPUT REQUESTS
**
*Restart, write, frequency=0
**
** FIELD OUTPUT: F-Output-1
**
*Output, field, variable=PRESELECT
**
** HISTORY OUTPUT: H-Output-1
**
*Output, history, variable=PRESELECT
*End Step
** ----------------------------------------------------------------
**
** STEP: Step-4-Free recovery
**
*Step, name="Step-4-Free recovery", nlgeom=YES, inc=10000
*Visco, cetol=0.01
0.01, 50., 0.0001, 0.1
**
** PREDEFINED FIELDS
**
** Name: Predefined Field-1   Type: Temperature
*Temperature, amplitude=rectem
block, 1.
**
** OUTPUT REQUESTS
**
*Restart, write, frequency=0
**
** FIELD OUTPUT: F-Output-1
**
*Output, field, variable=PRESELECT
**
** HISTORY OUTPUT: H-Output-1
**
*Output, history, variable=PRESELECT
*End Step
